d == i_L*(s*L + (R + R_int))/Vdc
i_.L == Vdc*d/(s*L + (R + R_int))
d*V_dc - v_b == R*i_L + L*s*i_L substitute, i_L == (Vdc*d - v_b)/(s*L + (R + 2*R_int)) → V_dc*d - v_b == -(R + L*s)*(v_b - Vdc*d)/(R + 2*R_int + L*s) solve, v_b → (R*V_dc*d - R*Vdc*d + 2*R_int*V_dc*d - L*Vdc*d*s + L*V_dc*d*s)/(2*R_int) factor → -d*(R*Vdc - R*V_dc - 2*R_int*V_dc + L*Vdc*s - L*V_dc*s)/(2*R_int)
d*V_V.dcdc - v_b == R*i_LV.dc + L*s*i_L substitute, d == i_L*(s*L + (R + R_int))/Vdc → (R*V_V.dcdc*i_L - Vdc*v_b + R_int*V_V.dcdc*i_L + L*V_V.dcdc*i_L*s)/Vdc == R*i_LV.dc + L*i_L*s solve, v_b → (R*V_V.dcdc*i_L + R_int*V_V.dcdc*i_L + L*V_V.dcdc*i_L*s)/Vdc - R*i_LV.dc - L*i_L*s factor → -(R*Vdc*i_LV.dc - R*V_V.dcdc*i_L - R_int*V_V.dcdc*i_L + L*Vdc*i_L*s - L*V_V.dcdc*i_L*s)/Vdc
d*V_dc - v_b == R*i_L + L*s*i_L substitute, i_L == Vdc*d/(s*L + (R + R_int)) → V_dc*d - v_b == Vdc*d*(R + L*s)/(R + R_int + L*s) solve, v_b → V_dc*d - Vdc*d*(R + L*s)/(R + R_int + L*s) factor → -d*(R*Vdc - R*V_dc - R_int*V_dc + L*Vdc*s - L*V_dc*s)/(R + R_int + L*s)
